h := 10*10^-3
4 deg = 0.0698132
h == sqrt(4*(l^2 + r^2)*sin(1/2*β)^2 - ((l^2 + r^2) - 2*l*sqrt(l^2 + r^2) + l^2)) solve, β → [
    2*asin(sqrt(20000*l^2 - 20000*l*sqrt(l^2 + r^2) + 10000*r^2 + 1)/(200*sqrt(l^2 + r^2)));
    -2*asin(sqrt(20000*l^2 - 20000*l*sqrt(l^2 + r^2) + 10000*r^2 + 1)/(200*sqrt(l^2 + r^2)))
]
r := 10*10^-3
l := 0, 0.001 .. 0.3
β(l) := 2*asin(sqrt(20000*l^2 - 20000*l*sqrt(l^2 + r^2) + 10000*r^2 + 1)/(200*sqrt(l^2 + r^2)))
0.14*1000 = 140
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